*Heading
** Job name: ArteryInflSymmInput Model name: ArteryInflSymm
** Generated by: Abaqus/CAE 6.13-1
*Preprint, echo=NO, model=NO, history=NO, contact=NO
**
** PARTS
**
*Part, name=artery
*Node
      1,           0., 0.00039999999,  4.99999987e-05
      2,  2.51162073e-05, 0.000399210694,  4.99999987e-05
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*Element, type=C3D8
  1, 105, 106, 132, 131,   1,   2,  28,  27
  2, 106, 107, 133, 132,   2,   3,  29,  28
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*Nset, nset=allelem, generate
   1,  728,    1
*Elset, elset=allelem, generate
   1,  450,    1
** Section: artery
*parameter
 Pi = 3.141592654
 gamma = 39.76
 theta1 = gamma
 c1 = cos(theta1*Pi/180)
 s1 = sin(theta1*Pi/180)
 theta2 = theta1-2*gamma
 c2 = cos(theta2*Pi/180)
 s2 = sin(theta2*Pi/180)
*orientation, name=ori-1, local directions=2, system=cylindrical
 0., 0., 0., 0., 0., 1.
 3, 0.
 0, <c1>, <s1>
 0, <c2>, <s2>
*Solid Section, elset=allelem, material=analytichg, orientation=ori-1
,
*End Part
**
**
** ASSEMBLY
**
*Assembly, name=Assembly
**
*Instance, name=artery-1, part=artery
*End Instance
**
*Nset, nset=Set-3, instance=artery-1
   1,   2,   3,   4,   5,   6
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*Elset, elset=Set-3, instance=artery-1
   1,   2,   3,   4,   5,   6
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*Nset, nset=Set-4, instance=artery-1, generate
   1,  703,   26
*Elset, elset=Set-4, instance=artery-1, generate
   1,  426,   25
*Nset, nset=Set-5, instance=artery-1, generate
  26,  728,   26
*Elset, elset=Set-5, instance=artery-1, generate
  25,  450,   25
*Elset, elset=_Surf-2_S1, internal, instance=artery-1, generate
 376,  450,    1
*Surface, type=ELEMENT, name=Surf-2
_Surf-2_S1, S1
*End Assembly
**
** MATERIALS
**
*Material, name=analytichg
*anisotropic hyperelastic,holzapfel, local directions=2
22120.,   1e-6,  206., 1.465,    0.
**
** BOUNDARY CONDITIONS
**
** Name: fix_z Type: Displacement/Rotation
*Boundary
Set-3, 3, 3
** Name: xozsymm Type: Displacement/Rotation
*Boundary
Set-5, 2, 2
** Name: yozsymm Type: Displacement/Rotation
*Boundary
Set-4, 1, 1
** ----------------------------------------------------------------
**
** STEP: Load
**
*Step, name=Load, nlgeom=YES
*Static
1., 1., 1e-05, 1.
**
** LOADS
**
** Name: pressure   Type: Pressure
*Dsload
Surf-2, P, 25000.
**
** OUTPUT REQUESTS
**
*Restart, write, frequency=0
**
** FIELD OUTPUT: F-Output-1
**
*Output, field, variable=PRESELECT
**
** HISTORY OUTPUT: H-Output-1
**
*Output, history, variable=PRESELECT
*End Step
