*Heading
** Job name: HolzapfelInput Model name: Holzapfel
** Generated by: Abaqus/CAE 6.13-1
*Preprint, echo=NO, model=NO, history=NO, contact=NO
**
** PARTS
**
*Part, name=specimen
*Node
      1,          1.5,           5.,         0.25
      2,          1.5,        4.875,         0.25
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*Element, type=C3D8
  1,  124,  125,  166,  165,    1,    2,   43,   42
  2,  125,  126,  167,  166,    2,    3,   44,   43
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*Nset, nset=allelem, generate
    1,  1599,     1
*Elset, elset=allelem, generate
   1,  960,    1
** Section: specimen
*parameter
 Pi = 3.141592654
 gamma = 49.98
 theta1 = gamma
 c1 = cos(theta1*Pi/180)
 s1 = sin(theta1*Pi/180)
 theta2 = theta1-2*gamma
 c2 = cos(theta2*Pi/180)
 s2 = sin(theta2*Pi/180)
*orientation,name=ori-1,local directions=2
 1.0,0.0,0.0,0.0,1.0,0.0
 3,0.0
 <s1>, <c1>, 0.0
 <s2>, <c2>, 0.0
*Solid Section, elset=allelem, material=AnalyticHGO, orientation=ori-1
,
*End Part
**
**
** ASSEMBLY
**
*Assembly, name=Assembly
**
*Instance, name=specimen-1, part=specimen
*End Instance
**
*Nset, nset=Set-1, instance=specimen-1
   83,   84,   85,   86,   87,   88
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*Elset, elset=Set-1, instance=specimen-1
  41,  42,  43,  44,  45,  46
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*Nset, nset=Set-2, instance=specimen-1, generate
   41,  1599,    41
*Elset, elset=Set-2, instance=specimen-1, generate
  40,  960,   40
*Nset, nset=Set-3, instance=specimen-1
   83,   84,   85,   86,   87,   88
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*Elset, elset=Set-3, instance=specimen-1
  41,  42,  43,  44,  45,  46
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*Nset, nset=Set-4, instance=specimen-1, generate
 1477,  1599,     1
*Elset, elset=Set-4, instance=specimen-1, generate
 881,  960,    1
*Nset, nset=Set-5, instance=specimen-1, generate
    1,  1559,    41
*Elset, elset=Set-5, instance=specimen-1, generate
   1,  921,   40
*End Assembly
**
** MATERIALS
**
*Material, name=AnalyticHGO
*parameter
 density=1.0e-4
 C10=3.82e-3
 D=1.
 K1=996.6e-3
 K2=524.6
 Kappa=0.0
*anisotropic hyperelastic,holzapfel, local directions=2
 <C10>, <D>, <K1>, <K2>, <Kappa>
**
** BOUNDARY CONDITIONS
**
** Name: xoy Type: Displacement/Rotation
*Boundary
Set-3, 3, 3
** Name: xoz Type: Displacement/Rotation
*Boundary
Set-2, 2, 2
** Name: yoz Type: Displacement/Rotation
*Boundary
Set-4, 1, 1
** ----------------------------------------------------------------
**
** STEP: load
**
*Step, name=load, nlgeom=YES
*Static
1., 1., 1e-05, 1.
**
** BOUNDARY CONDITIONS
**
** Name: load Type: Displacement/Rotation
*Boundary
Set-5, 2, 2, 2.
**
** OUTPUT REQUESTS
**
*Restart, write, frequency=0
**
** FIELD OUTPUT: F-Output-1
**
*Output, field
*Node Output
CF, RF, U
*Element Output, directions=YES
ENER, LE, PE, PEEQ, PEMAG, S
*Contact Output
CDISP, CSTRESS
** HISTORY OUTPUT: H-Output-1
**
*Output, history, variable=PRESELECT
*End Step
