*Heading
** Job name: arteryinfl Model name: ArteryInfl
** Generated by: Abaqus/CAE 6.13-1
*Preprint, echo=NO, model=NO, history=NO, contact=NO
**
** PARTS
**
*Part, name=artery
*Node
      1, 0.000150000007,           0.,  4.99999987e-05
      2, 0.000199999995,           0.,  4.99999987e-05
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*Element, type=C3D20R
  1,  116,  429,    9,    1,  929, 1821, 1129,  122, 2804, 2803, 2802, 2801, 2805, 2806, 2807,
     2808, 2810, 2809, 2811, 2812
  2,  429,  430,   10,    9, 1821, 1822, 1128, 1129, 2815, 2814, 2813, 2803, 2816, 2817, 2818,
     2806, 2809, 2819, 2820, 2811
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*Nset, nset=Set-12, generate
     1,  10100,      1
*Elset, elset=Set-12, generate
    1,  1800,     1
** Section: artery
*Solid Section, elset=Set-12, material=builtinholzapfel, orientation=ori-1
*parameter
 Pi = 3.141592654
 theta = 39.76
 c = cos(theta*Pi/180)
 s = sin(theta*Pi/180)
*orientation,name=ori-1,local directions=2, system=cylindrical
 0.0,0.0,0.0,0.0,0.0,1.0
 3,0.0
 0., <c>, <s>
 0., <c>, -<s>
*End Part
**
**
** ASSEMBLY
**
*Assembly, name=Assembly
**
*Instance, name=artery-1, part=artery
*End Instance
**
*Nset, nset=Set-1, instance=artery-1
     1,     2,     3,     4,     5,     6
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*Elset, elset=Set-1, instance=artery-1
    1,    2,    3,    4,    5,    6
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*Nset, nset=Set-2, instance=artery-1
     1,     2,     3,     4,     5,     6
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*Elset, elset=Set-2, instance=artery-1
    1,    2,    3,    4,    5,    6
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*Elset, elset=_Surf-1_S6, internal, instance=artery-1, generate
    1,  1795,     6
*Surface, type=ELEMENT, name=Surf-1
_Surf-1_S6, S6
*End Assembly
**
** MATERIALS
**
*Material, name=builtinholzapfel
*Anisotropic Hyperelastic, holzapfel, local direction=2
22120.,   .2,  206., 1.465,    0.
**
** BOUNDARY CONDITIONS
**
** Name: fixed_ends Type: Displacement/Rotation
*Boundary
Set-2, 3, 3
** ----------------------------------------------------------------
**
** STEP: Load
**
*Step, name=Load, nlgeom=YES
*Static
1., 1., 1e-05, 1.
**
** LOADS
**
** Name: pressure   Type: Pressure
*Dsload
Surf-1, P, 25000.
**
** OUTPUT REQUESTS
**
*Restart, write, frequency=0
**
** FIELD OUTPUT: F-Output-1
**
*Output, field, variable=PRESELECT
**
** HISTORY OUTPUT: H-Output-1
**
*Output, history, variable=PRESELECT
*End Step
