*Heading
** Iliac Adventitial strip: circumferential specimen
** Perfectly aligned fibers (Kappa=0)
** Uniaxial tension, Load = 2.0 N
** 8th Symmetry Model
*Preprint, echo=NO, model=NO, history=NO, contact=NO
**
** PARTS
**
*Part, name=Part-1
*End Part
**
**
** ASSEMBLY
**
*Assembly, name=Assembly
**
*Instance, name=Part-1-1, part=Part-1
*Node
      1,   5.00043344,          1.5,         0.25
      2,   5.00043344,   1.35000002,         0.25
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*Element, type=C3D8
  1,  34,  35,  46,  45,   1,   2,  13,  12
  2,  35,  36,  47,  46,   2,   3,  14,  13
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*Nset, nset=strip, internal, generate
   1,  693,    1
*Elset, elset=strip, internal, generate
   1,  400,    1
** Section: strip
*parameter
 Pi = 3.141592654
 gamma = 49.98
 theta1 = gamma
 c1 = cos(theta1*Pi/180)
 s1 = sin(theta1*Pi/180)
 theta2 = theta1-2*gamma
 c2 = cos(theta2*Pi/180)
 s2 = sin(theta2*Pi/180)
*orientation,name=ori-1,local directions=2
 1.0,0.0,0.0,0.0,1.0,0.0
 3,0.0
 <c1>, <s1>, 0.0
 <c2>, <s2>, 0.0
*Solid Section, elset=strip, material=IliacAdventitia, orientation=ori-1
1.,
*End Instance
**
*Nset, nset=endface, instance=Part-1-1, generate
  1,  33,   1
*Nset, nset=nDriven, instance=Part-1-1, generate
  2,  33,   1
*Nset, nset=nLoad, instance=Part-1-1
  1
*Nset, nset=xsymm, instance=Part-1-1, generate
 661,  693,    1
*Nset, nset=zsymm, instance=Part-1-1
  23,  24,  25,  26,  27,  28
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*Nset, nset=ysymm, instance=Part-1-1, generate
  11,  693,   11
*equation
 2,
 nDriven, 1, 1, nLoad, 1, -1
*End Assembly
**
** MATERIALS
**
*parameter
 density=1.0e-4
 C10=3.82e-3
 D=1e-2
 K1=996.6e-3
 K2=524.6
 Kappa=0.0
*Material, name=IliacAdventitia
*density
 <density>
*anisotropic hyperelastic,holzapfel, local directions=2
 <C10>, <D>, <K1>, <K2>, <Kappa>
** ----------------------------------------------------------------
**
** STEP: Step-1
**
*Step, nlgeom, name=Step-1, inc=200
Simple Tension
*Static
 0.001, 1.,,0.01
**
** BOUNDARY CONDITIONS
**
*Boundary
 xsymm, 1, 1
 zsymm, 3, 3
 ysymm, 2, 2
 endface, 2, 3
*Cload
 nLoad, 1, 0.5
**
** OUTPUT REQUESTS
**
*Restart, write, number interval=10, time marks=NO
**
** FIELD OUTPUT: F-Output-1
**
*Output, field, number interval=10, variable=PRESELECT
**
** HISTORY OUTPUT: H-Output-1
**
*Output, history, variable=PRESELECT
*node output, nset=nLoad
 CF1, U1
*End Step
